<?xml version="1.0"?>

<propeller name="Aeronaut_15x8">
  <ixx> 0.00085 </ixx>
  <diameter unit="IN"> 15 </diameter>
  <numblades> 2 </numblades>
  <minpitch> 10 </minpitch>
  <maxpitch> 10 </maxpitch>

  <table name="C_THRUST" type="internal">
     <tableData>
       0.0   0.0047
       0.1   0.0045
       0.2   0.0043
       0.3   0.0040
       0.4   0.0036
       0.5   0.0032
       0.6   0.0026
       0.7   0.0019
       0.8   0.0010
       1.0  -0.0004
       1.2  -0.0019
       1.4  -0.0033
     </tableData>
  </table>


  <table name="C_POWER" type="internal">
     <tableData>
       0.0   0.0032
       0.1   0.0032
       0.2   0.0031
       0.3   0.0030
       0.4   0.0028
       0.5   0.0026
       0.6   0.0024
       0.7   0.0020
       0.8   0.0016
       1.0   0.0006
       1.2  -0.0009
       1.4  -0.0028
       1.6  -0.0048
     </tableData>
  </table>

<!-- thrust effects of helical tip Mach -->
<table name="CT_MACH" type="internal">
  <tableData>
    0.85   1.0
    1.05   0.8
  </tableData>
</table>

<!-- power-required effects of helical tip Mach -->
<table name="CP_MACH" type="internal">
  <tableData>
    0.85   1.0
    1.05   1.8
    2.00   1.4
  </tableData>
</table>

</propeller>
