<?xml version="1.0"?>
<?xml-stylesheet type="text/xsl" href="http://jsbsim.sourceforge.net/JSBSim.xsl"?>
<fdm_config name="lynxUAS" version="2.0" release="ALPHA"
   xmlns:xsi="http://www.w3.org/2001/XMLSchema-instance"
   xsi:noNamespaceSchemaLocation="http://jsbsim.sourceforge.net/JSBSim.xsd">

 <fileheader>
  <author> Silverwing Industries Inc. and Aeromatic v 0.95 </author>
  <filecreationdate>2015-11-26</filecreationdate>
  <version>2</version>
  <description>Dynamic model of the Swift Radioplans lynx UAS based off XFLR5 analysis data</description>
 </fileheader>

 <metrics>
   <wingarea  unit="FT2">    5.21 </wingarea>
   <wingspan  unit="FT" >    7.50 </wingspan>
   <wing_incidence>          2.00 </wing_incidence>
   <chord     unit="FT" >    0.72 </chord>
   <htailarea unit="FT2">    0.75 </htailarea>
   <htailarm  unit="FT" >    2.29 </htailarm>
   <vtailarea unit="FT2">    0.43 </vtailarea>
   <vtailarm  unit="FT" >    1.77 </vtailarm>
   <location name="AERORP" unit="IN">
     <x> 11.421 </x>
     <!-- x>  10.125 </x -->
     <y> 0 </y>
     <z> 1 </z>
   </location>
   <location name="EYEPOINT" unit="IN">
     <x> 0 </x>
     <y> 0 </y>
     <z> 0 </z>
   </location>
   <location name="VRP" unit="IN">
     <x> 0 </x>
     <y> 0 </y>
     <z> 0 </z>
   </location>
 </metrics>

 <mass_balance>
   <ixx unit="SLUG*FT2">    0.1913 </ixx>
   <iyy unit="SLUG*FT2">    0.1118 </iyy>
   <izz unit="SLUG*FT2">    0.2918 </izz>
   <emptywt unit="LBS" >         8 </emptywt>
	<ixy unit="SLUG*FT2"> 0 </ixy>
	<ixz unit="SLUG*FT2"> -0.005121 </ixz>
	<iyz unit="SLUG*FT2"> 0 </iyz>
   <location name="CG" unit="IN">
     <x>  10.125 </x>
     <y>  0.00 </y>
     <z>  -0.543 </z>
   </location>
 </mass_balance>

 <ground_reactions>

<!-- Virtual landing gear for SITL -->
	<contact type="BOGEY" name="LEFT_MLG">
		<location unit="IN">
		    <x> 11.5 </x>
		    <y> -8 </y>
		    <z> -8 </z>
		</location>
		<static_friction> 0.8 </static_friction>
		<dynamic_friction> 0.5 </dynamic_friction>
		<rolling_friction> 0.02 </rolling_friction>
		<spring_coeff unit="LBS/FT"> 105 </spring_coeff>
		<damping_coeff unit="LBS/FT/SEC"> 15 </damping_coeff>
		<max_steer unit="DEG"> 0.0 </max_steer>
		<brake_group> LEFT </brake_group>
		<retractable>0</retractable>
	</contact>
	<contact type="BOGEY" name="RIGHT_MLG">
		<location unit="IN">
		    <x> 11.5 </x>
		    <y> 8 </y>
		    <z> -8 </z>
		</location>
		<static_friction> 0.8 </static_friction>
		<dynamic_friction> 0.5 </dynamic_friction>
		<rolling_friction> 0.02 </rolling_friction>
		<spring_coeff unit="LBS/FT"> 105 </spring_coeff>
		<damping_coeff unit="LBS/FT/SEC"> 15 </damping_coeff>
		<max_steer unit="DEG"> 0.0 </max_steer>
		<brake_group> RIGHT </brake_group>
		<retractable>0</retractable>
	</contact>
	<contact type="BOGEY" name="NOSE_LG">
		<location unit="IN">
		    <x> 4 </x>
		    <y> 0 </y>
		    <z> -8 </z>
		</location>
		<static_friction> 0.8 </static_friction>
		<dynamic_friction> 0.5 </dynamic_friction>
		<rolling_friction> 0.02 </rolling_friction>
		<spring_coeff unit="LBS/FT"> 75 </spring_coeff>
		<damping_coeff unit="LBS/FT/SEC"> 15 </damping_coeff>
		<max_steer unit="DEG"> 45 </max_steer>
		<brake_group> NONE </brake_group>
		<retractable>0</retractable>
	</contact>

<!-- End of virtual landing gear definition -->

  <contact type="STRUCTURE" name="LEFT_WING">
    <location unit="IN">
     <x>   8 </x>
     <y>  -45 </y>
     <z>  4 </z>
    </location>
    <static_friction>  1.0 </static_friction>
    <dynamic_friction> 0.9 </dynamic_friction>
        <spring_coeff unit="LBS/FT"> 12 </spring_coeff>
    <damping_coeff unit="LBS/FT/SEC"> 2 </damping_coeff>
  </contact>

  <contact type="STRUCTURE" name="RIGHT_WING">
    <location unit="IN">
     <x>   8 </x>
     <y>  45 </y>
     <z>  4 </z>
    </location>
    <static_friction>  1.0 </static_friction>
    <dynamic_friction> 0.9 </dynamic_friction>
        <spring_coeff unit="LBS/FT"> 12 </spring_coeff>
    <damping_coeff unit="LBS/FT/SEC"> 2 </damping_coeff>
  </contact>

  <contact type="STRUCTURE" name="SKID_1">
    <location unit="IN">
     <x>   2 </x>
     <y>  0 </y>
     <z>  -5 </z>
    </location>
    <static_friction>  0.80 </static_friction>
    <dynamic_friction> 0.75 </dynamic_friction>
        <spring_coeff unit="LBS/FT"> 120 </spring_coeff>
    <damping_coeff unit="LBS/FT/SEC"> 20 </damping_coeff>
  </contact>

  <contact type="STRUCTURE" name="SKID_2">
    <location unit="IN">
     <x>   12 </x>
     <y>  0 </y>
     <z>  -5 </z>
    </location>
    <static_friction>  0.80 </static_friction>
    <dynamic_friction> 0.75 </dynamic_friction>
        <spring_coeff unit="LBS/FT"> 120 </spring_coeff>
    <damping_coeff unit="LBS/FT/SEC"> 20 </damping_coeff>
  </contact>

  <contact type="STRUCTURE" name="TAIL">
    <location unit="IN">
     <x>   40 </x>
     <y>  0 </y>
     <z>  0 </z>
    </location>
    <static_friction>  0.92 </static_friction>
    <dynamic_friction> 0.90 </dynamic_friction>
    <spring_coeff unit="LBS/FT"> 120 </spring_coeff>
    <damping_coeff unit="LBS/FT/SEC"> 20 </damping_coeff>
  </contact>

 </ground_reactions>

 <propulsion>

   <engine file="T-Motor_MN5208">
    <location unit="IN">
      <x>   0.00 </x>
      <y>   0.00 </y>
      <z>   -1 </z>
    </location>
    <orient unit="DEG">
      <pitch> 0.00 </pitch>
      <roll>  0.00 </roll>
      <yaw>   0.00 </yaw>
    </orient>
    <feed>0</feed>
    <thruster file="Aeronaut_15x8">
     <location unit="IN">
       <x>   0.00 </x>
       <y>   0.00 </y>
       <z>   -1 </z>
     </location>
     <orient unit="DEG">
       <pitch> 0.00 </pitch>
       <roll>  0.00 </roll>
       <yaw>   0.00 </yaw>
     </orient>
     <p_factor>1.0</p_factor>
    </thruster>
  </engine>

 </propulsion>

 <flight_control name="FCS: lynxUAS">

  <channel name="Pitch">

   <summer name="Pitch Trim Sum">
      <input>fcs/elevator-cmd-norm</input>
      <input>fcs/pitch-trim-cmd-norm</input>
      <clipto>
        <min> -1 </min>
        <max>  1 </max>
      </clipto>
   </summer>

   <aerosurface_scale name="Elevator Control">
      <input>fcs/pitch-trim-sum</input>
      <range>
        <min> -0.14835 </min>
        <max>  0.14835 </max>
      </range>
      <output>fcs/elevator-pos-rad</output>
   </aerosurface_scale>

   <aerosurface_scale name="elevator normalization">
      <input>fcs/elevator-pos-rad</input>
      <domain>
        <min> -0.14835 </min>
        <max>  0.14835 </max>
      </domain>
      <range>
        <min> -1 </min>
        <max>  1 </max>
      </range>
      <output>fcs/elevator-pos-norm</output>
   </aerosurface_scale>

  </channel>

  <channel name="Yaw">

   <summer name="Rudder Command Sum">
      <input>fcs/rudder-cmd-norm</input>
      <input>fcs/yaw-trim-cmd-norm</input>
      <clipto>
        <min> -1 </min>
        <max>  1 </max>
      </clipto>
   </summer>

   <aerosurface_scale name="Rudder Control">
      <input>fcs/rudder-command-sum</input>
      <range>
        <min> -0.34906 </min>
        <max>  0.34906 </max>
      </range>
      <output>fcs/rudder-pos-rad</output>
   </aerosurface_scale>

   <aerosurface_scale name="rudder normalization">
      <input>fcs/rudder-pos-rad</input>
      <domain>
        <min> -0.34906 </min>
        <max>  0.34906 </max>
      </domain>
      <range>
        <min> -1 </min>
        <max>  1 </max>
      </range>
      <output>fcs/rudder-pos-norm</output>
   </aerosurface_scale>

  </channel>

 </flight_control>

 <aerodynamics>

  <axis name="LIFT"> <!-- XFLR5 data complete -->

    <function name="aero/force/Lift_alpha_beta">
      <description>Lift due to alpha and beta</description>
      <product>
          <property>aero/qbar-psf</property>
          <property>metrics/Sw-sqft</property>
          <table>
            <independentVar lookup="row">aero/alpha-rad</independentVar>
			<independentVar lookup="column">aero/beta-rad</independentVar>
            <tableData>
            			-15.000	-10.000	-5.0000	-2.0000	 0.0000	 2.0000	 5.0000	 10.000	 15.000
				-0.1745	-0.5019 -0.5129 -0.5014 -0.5095 -0.5106 -0.5095 -0.5014 -0.5129 -0.5019
				-0.1571	-0.4163 -0.4252 -0.4124 -0.4203 -0.4213 -0.4203 -0.4124 -0.4252 -0.4163
				-0.1396	-0.3302 -0.3371 -0.3229 -0.3306 -0.3316 -0.3306 -0.3229 -0.3371 -0.3302
				-0.1222	-0.2437 -0.2485 -0.2330 -0.2405 -0.2415 -0.2405 -0.2330 -0.2485 -0.2437
				-0.1047	-0.1569 -0.1597 -0.1427 -0.1500 -0.1510 -0.1500 -0.1427 -0.1597 -0.1569
				-0.0873	-0.0698 -0.0705 -0.0523 -0.0593 -0.0603 -0.0593 -0.0523 -0.0705 -0.0698
				-0.0698	 0.0173  0.0187  0.0383  0.0314  0.0305  0.0314  0.0383  0.0187  0.0173
				-0.0524	 0.1047  0.1080  0.1290  0.1224  0.1215  0.1224  0.1290  0.1080  0.1047
				-0.0349	 0.1920  0.1974  0.2197  0.2133  0.2125  0.2133  0.2197  0.1974  0.1920
				-0.0175	 0.2793  0.2866  0.3103  0.3041  0.3033  0.3041  0.3103  0.2866  0.2793
				 0.0000	 0.3664  0.3757  0.4007  0.3948  0.3940  0.3948  0.4007  0.3757  0.3664
				 0.0175	 0.4532  0.4645  0.4908  0.4852  0.4844  0.4852  0.4908  0.4645  0.4532
				 0.0349	 0.5397  0.5530  0.5805  0.5752  0.5745  0.5752  0.5805  0.5530  0.5397
				 0.0524	 0.6257  0.6410  0.6699  0.6648  0.6641  0.6648  0.6699  0.6410  0.6257
				 0.0698	 0.7113  0.7285  0.7587  0.7538  0.7532  0.7538  0.7587  0.7285  0.7113
				 0.0873	 0.7963  0.8154  0.8469  0.8423  0.8417  0.8423  0.8469  0.8154  0.7963
				 0.1047	 0.8806  0.9016  0.9344  0.9301  0.9295  0.9301  0.9344  0.9016  0.8806
				 0.1222	 0.9641  0.9871  1.0211  1.0171  1.0165  1.0171  1.0211  0.9871  0.9641
				 0.1396	 1.0468  1.0717  1.1070  1.1032  1.1027  1.1032  1.1070  1.0717  1.0468
				 0.1571	 1.1286  1.1554  1.1920  1.1884  1.1879  1.1884  1.1920  1.1554  1.1286
				 0.1745	 1.2095  1.2382  1.2760  1.2727  1.2722  1.2727  1.2760  1.2382  1.2095
				 0.1920	 1.2892  1.3198  1.3589  1.3558  1.3554  1.3558  1.3589  1.3198  1.2892
				 0.2094	 1.3679  1.4004  1.4406  1.4379  1.4374  1.4379  1.4406  1.4004  1.3679
				 0.2269	 1.4454  1.4797  1.5000	 1.5000	 1.5000  1.5000  1.5000  1.4797  1.4454
				 0.2443	 1.5000  1.5000	 1.5000  1.5000	 1.5000  1.5000	 1.5000  1.5000  1.5000
				 0.4363	 1.0000  1.0000	 1.0000  1.0000	 1.0000  1.0000	 1.0000  1.0000  1.0000
				 1.0410	 0.6000  0.6000  0.6000  0.6000  0.6000  0.6000  0.6000  0.6000  0.6000
            </tableData>
          </table>
      </product>
    </function>

    <function name="aero/force/Lift_de">
       <description>Lift due to Elevator Deflection</description>
       <product>
           <property>aero/qbar-psf</property>
           <property>metrics/Sw-sqft</property>
           <property>fcs/elevator-pos-rad</property>
           <value>0.55581</value>
       </product>
    </function>

  </axis>

  <axis name="DRAG"> <!-- XFLR5 data complete -->

    <function name="aero/force/Drag_alpha_beta">
       <description>Induced Drag</description>
       <product>
          <property>aero/qbar-psf</property>
          <property>metrics/Sw-sqft</property>
          <table>
            <independentVar lookup="row">aero/alpha-rad</independentVar>
			<independentVar lookup="column">aero/beta-rad</independentVar>
            <tableData>
             			-15.000	-10.000	-5.0000	-2.0000	 0.0000	 2.0000	 5.0000	 10.000	 15.000
      		    -0.1745	 0.0191  0.0139  0.0125  0.0120  0.0120  0.0120  0.0125  0.0139  0.0191
				-0.1571	 0.0158  0.0108  0.0094  0.0089  0.0089  0.0089  0.0094  0.0108  0.0158
				-0.1396	 0.0130  0.0082  0.0069  0.0064  0.0063  0.0064  0.0069  0.0082  0.0130
				-0.1222	 0.0108  0.0062  0.0049  0.0043  0.0043  0.0043  0.0049  0.0062  0.0108
				-0.1047	 0.0091  0.0046  0.0034  0.0029  0.0028  0.0029  0.0034  0.0046  0.0091
				-0.0873	 0.0079  0.0037  0.0025  0.0019  0.0018  0.0019  0.0025  0.0037  0.0079
				-0.0698	 0.0073  0.0033  0.0021  0.0015  0.0014  0.0015  0.0021  0.0033  0.0073
				-0.0524	 0.0073  0.0034  0.0023  0.0017  0.0016  0.0017  0.0023  0.0034  0.0073
				-0.0349	 0.0078  0.0041  0.0030  0.0025  0.0023  0.0025  0.0030  0.0041  0.0078
				-0.0175	 0.0089  0.0054  0.0043  0.0038  0.0036  0.0038  0.0043  0.0054  0.0089
				 0.0000	 0.0105  0.0072  0.0061  0.0056  0.0055  0.0056  0.0061  0.0072  0.0105
				 0.0175	 0.0127  0.0095  0.0085  0.0080  0.0079  0.0080  0.0085  0.0095  0.0127
				 0.0349	 0.0154  0.0124  0.0114  0.0110  0.0109  0.0110  0.0114  0.0124  0.0154
				 0.0524	 0.0187  0.0159  0.0149  0.0144  0.0144  0.0144  0.0149  0.0159  0.0187
				 0.0698	 0.0226  0.0198  0.0189  0.0185  0.0184  0.0185  0.0189  0.0198  0.0226
				 0.0873	 0.0269  0.0243  0.0234  0.0230  0.0230  0.0230  0.0234  0.0243  0.0269
				 0.1047	 0.0318  0.0293  0.0284  0.0281  0.0280  0.0281  0.0284  0.0293  0.0318
				 0.1222	 0.0371  0.0348  0.0338  0.0336  0.0336  0.0336  0.0338  0.0348  0.0371
				 0.1396	 0.0430  0.0408  0.0398  0.0396  0.0396  0.0396  0.0398  0.0408  0.0430
				 0.1571	 0.0493  0.0472  0.0462  0.0461  0.0462  0.0461  0.0462  0.0472  0.0493
				 0.1745	 0.0560  0.0541  0.0531  0.0531  0.0531  0.0531  0.0531  0.0541  0.0560
				 0.1920	 0.0632  0.0614  0.0604  0.0604  0.0605  0.0604  0.0604  0.0614  0.0632
				 0.2094	 0.0708  0.0691  0.0681  0.0682  0.0683  0.0682  0.0681  0.0691  0.0708
				 0.2269	 0.0788  0.0772  0.0761  0.0763  0.0765  0.0763  0.0761  0.0772  0.0788
				 0.2443	 0.0871  0.0857  0.0845  0.0848  0.0850  0.0848  0.0845  0.0857  0.0871
				 0.2618	 0.0958  0.0944  0.0933  0.0937  0.0939  0.0937  0.0933  0.0944  0.0958
				 0.2793	 0.1048  0.1035  0.1023  0.1029  0.1031  0.1029  0.1023  0.1035  0.1048
				 0.2967	 0.1141  0.1129  0.1117  0.1123  0.1126  0.1123  0.1117  0.1129  0.1141
				 0.3142	 0.1237  0.1225  0.1213  0.1220  0.1223  0.1220  0.1213  0.1225  0.1237
				 0.3316	 0.1335  0.1324  0.1311  0.1319  0.1323  0.1319  0.1311  0.1324  0.1335
				 0.3491	 0.1435  0.1424  0.1411  0.1420  0.1425  0.1420  0.1411  0.1424  0.1435
				 0.4363	 0.1735  0.1735  0.1735  0.1735  0.1735  0.1735  0.1735  0.1735  0.1735
				 0.5235	 0.2119  0.2119  0.2119  0.2119  0.2119  0.2119  0.2119  0.2119  0.2119
				 0.6108	 0.2499  0.2499  0.2499  0.2499  0.2499  0.2499  0.2499  0.2499  0.2499
				 0.6981	 0.2840  0.2840  0.2840  0.2840  0.2840  0.2840  0.2840  0.2840  0.2840
				 0.7853	 0.3108  0.3108  0.3108  0.3108  0.3108  0.3108  0.3108  0.3108  0.3108
				 0.8726	 0.3277  0.3277  0.3277  0.3277  0.3277  0.3277  0.3277  0.3277  0.3277
				 0.9599	 0.3322  0.3322  0.3322  0.3322  0.3322  0.3322  0.3322  0.3322  0.3322
				 1.0471	 0.3229  0.3229  0.3229  0.3229  0.3229  0.3229  0.3229  0.3229  0.3229
            </tableData>
          </table>
       </product>
    </function>

    <function name="aero/force/Drag_v">
       <description>Viscous drag</description>
         <product>
           <property>aero/qbar-psf</property>
           <property>metrics/Sw-sqft</property>
           <value>0.03085</value>
           <!-- value>0.030</value -->
         </product>
    </function>

    <function name="aero/force/Drag_de">
       <description>Drag due to Elevator Deflection</description>
       <product>
           <property>aero/qbar-psf</property>
           <property>metrics/Sw-sqft</property>
           <abs><property>fcs/elevator-pos-norm</property></abs>
           <value>0.01503</value>
       </product>
    </function>

    <function name="aero/force/Drag_dr">
       <description>Drag due to Rudder Deflection</description>
       <product>
           <property>aero/qbar-psf</property>
           <property>metrics/Sw-sqft</property>
           <abs><property>fcs/rudder-pos-norm</property></abs>
           <value>0.01366</value>
       </product>
    </function>

  </axis>

  <axis name="SIDE"> <!-- XFLR5 data complete -->

    <function name="aero/force/Y_beta">
       <description>Side force due to beta</description>
       <product>
           <property>aero/qbar-psf</property>
           <property>metrics/Sw-sqft</property>
           <property>aero/beta-rad</property>
           <value>-0.2341</value>
       </product>
    </function>


    <function name="aero/force/Y_dr">
       <description>Side force due to rudder</description>
       <product>
           <property>aero/qbar-psf</property>
           <property>metrics/Sw-sqft</property>
           <property>fcs/rudder-pos-rad</property>
           <value>0.14635</value>
       </product>
    </function>

  </axis>

  <axis name="ROLL"> <!-- XFLR5 data complete -->

    <function name="aero/moment/L_beta">
       <description>Roll moment due to beta</description>
       <product>
           <property>aero/qbar-psf</property>
           <property>metrics/Sw-sqft</property>
           <property>metrics/bw-ft</property>
           <property>aero/beta-rad</property>
           <value>-0.1816</value>
       </product>
    </function>

    <function name="aero/moment/L_p">
       <description>Roll moment due to roll rate</description>
       <product>
           <property>aero/qbar-psf</property>
           <property>metrics/Sw-sqft</property>
           <property>metrics/bw-ft</property>
           <property>aero/bi2vel</property>
           <property>velocities/p-aero-rad_sec</property>
           <value>-0.5769</value>
       </product>
    </function>

    <function name="aero/moment/L_r">
       <description>Roll moment due to yaw rate</description>
       <product>
           <property>aero/qbar-psf</property>
           <property>metrics/Sw-sqft</property>
           <property>metrics/bw-ft</property>
           <property>aero/bi2vel</property>
           <property>velocities/r-aero-rad_sec</property>
           <value>0.1671</value>
       </product>
    </function>

    <function name="aero/moment/L_dr">
       <description>Roll moment due to rudder</description>
       <product>
           <property>aero/qbar-psf</property>
           <property>metrics/Sw-sqft</property>
           <property>metrics/bw-ft</property>
           <property>fcs/rudder-pos-rad</property>
           <value>0.0037452</value>
       </product>
    </function>

  </axis>

  <axis name="PITCH"> <!-- XFLR5 data complete -->

    <function name="aero/moment/M_alpha">
       <description>Pitch moment due to alpha</description>
       <product>
          <property>aero/qbar-psf</property>
          <property>metrics/Sw-sqft</property>
          <table>
            <independentVar lookup="row">aero/alpha-deg</independentVar>
            <tableData>
				  -10.000   0.073236
				   -9.000   0.072598
				   -8.000   0.070993
				   -7.000   0.068422
				   -6.000   0.064889
				   -5.000   0.060398
				   -4.000   0.054954
				   -3.000   0.048564
				   -2.000   0.041236
				   -1.000   0.032979
					0.000   0.023802
					1.000   0.013718
					2.000   0.002737
					3.000  -0.009125
					4.000  -0.021856
					5.000  -0.035439
					6.000  -0.049858
					7.000  -0.065096
					8.000  -0.081133
					9.000  -0.097950
				   10.000  -0.115527
				   11.000  -0.133842
				   12.000  -0.152873
				   13.000  -0.172598
				   14.000  -0.192990
				   15.000  -0.214027
				   16.000  -0.235682
				   17.000  -0.257929
				   18.000  -0.280741
				   19.000  -0.304090
				   20.000  -0.327947
				   40.000  -0.100000
				   60.000  -0.400000
            </tableData>
          </table>
       </product>
    </function>

    <function name="aero/moment/M_beta">
       <description>Pitch moment due to beta</description>
       <product>
          <property>aero/qbar-psf</property>
          <property>metrics/Sw-sqft</property>
          <table>
            <independentVar lookup="row">aero/beta-deg</independentVar>
            <tableData>
             	   -15.000   0.148708
				   -14.000   0.129935
				   -13.000   0.119310
				   -12.000   0.118344
				   -11.000   0.115415
				   -10.000   0.100041
					-9.000   0.087960
					-8.000   0.075937
					-7.000   0.051351
					-6.000   0.017487
					-5.000   0.011042
					-4.000   0.017193
					-3.000   0.020466
					-2.000   0.022585
					-1.000   0.023541
					 0.000   0.023803
					 1.000   0.023537
					 2.000   0.022576
					 3.000   0.020452
					 4.000   0.017173
					 5.000   0.011017
					 6.000   0.017470
					 7.000   0.051346
					 8.000   0.075942
					 9.000   0.087965
					10.000   0.100045
					11.000   0.115419
					12.000   0.118344
					13.000   0.119305
					14.000   0.129928
					15.000   0.148702
            </tableData>
          </table>
       </product>
    </function>

    <function name="aero/moment/M_de">
       <description>Pitch moment due to elevator</description>
       <product>
          <property>aero/qbar-psf</property>
          <property>metrics/Sw-sqft</property>
          <property>metrics/cbarw-ft</property>
          <property>fcs/elevator-pos-rad</property>
          <value>-1.50431</value>
       </product>
    </function>

    <function name="aero/moment/M_q">
       <description>Pitch moment due to pitch rate</description>
       <product>
           <property>aero/qbar-psf</property>
           <property>metrics/Sw-sqft</property>
           <property>metrics/cbarw-ft</property>
           <property>aero/ci2vel</property>
           <property>velocities/q-aero-rad_sec</property>
           <value>-10.208</value>
       </product>
    </function>

  </axis>

  <axis name="YAW"> <!-- XFLR5 data complete -->

    <function name="aero/moment/N_beta">
       <description>Yaw moment due to beta</description>
       <product>
           <property>aero/qbar-psf</property>
           <property>metrics/Sw-sqft</property>
           <property>metrics/bw-ft</property>
           <property>aero/beta-rad</property>
           <value>0.0249</value>
       </product>
    </function>

    <function name="aero/moment/N_p">
       <description>Yaw moment due to roll rate</description>
       <product>
           <property>aero/qbar-psf</property>
           <property>metrics/Sw-sqft</property>
           <property>metrics/bw-ft</property>
           <property>aero/bi2vel</property>
           <property>velocities/p-aero-rad_sec</property>
           <value>-0.0923</value>
       </product>
    </function>

    <function name="aero/moment/N_r">
       <description>Yaw moment due to yaw rate</description>
       <product>
           <property>aero/qbar-psf</property>
           <property>metrics/Sw-sqft</property>
           <property>metrics/bw-ft</property>
           <property>aero/bi2vel</property>
           <property>velocities/r-aero-rad_sec</property>
           <value>-0.0189</value>
       </product>
    </function>

    <function name="aero/moment/N_dr">
       <description>Yaw moment due to rudder</description>
       <product>
           <property>aero/qbar-psf</property>
           <property>metrics/Sw-sqft</property>
           <property>metrics/bw-ft</property>
           <property>fcs/rudder-pos-rad</property>
           <value>-0.0375</value>
       </product>
    </function>

  </axis>

 </aerodynamics>

 <external_reactions>
 </external_reactions>

</fdm_config>
